# textile production, nonwoven polyester, needle-punched

Dataset: EcoSpold 2, unit process
Geography: RoW
Time period: 2014-04-01 to 2023-03-31
Technology level: current
Classification: EcoSpold01Categories: textiles/processing
Classification: ISIC rev.4 ecoinvent: 1311:Preparation and spinning of textile fibres
Scenario: Business-as-Usual
System model: Allocation, cut-off by classification
Generated by: [System]
Published in: Faist Emmenegger, M. 2018
Database: ecoinvent
isCopyrightProtected: true
accessRestrictedTo: 1

## General comment
Inventory refers to production of1 kg Nonwoven Needlepunched textile . This dataset is a copy of Indian dataset.
Needlepunching is a nonwoven process by which the fibres are mechanically entangled to produce a nonwoven fabric by repeated penetration of barbed needles through a preformed dry fibrous web. The machine which accomplishes this process is known as needle loom.
The Needle punch webs offer a wide range of product characteristics such as:
Unique physical properties i.e., elongation in the X, Y & Z direction for mould-able applications,
Ability to attach layers of different type fibre webs to produce composites,
High opacity per unit area,
High strength makes them overwhelming choice for geotextile fabric
The major Application and End-usages of needle punch fabrics are:
Geotextiles :
Needle punch geotextiles are used in functions like
Separation,
Filtration,
Reinforcement,
Drainage & erosion control and
Find applications in roads, railways, air runways, coastal shore protection, etc.
Needle punch carpets: They are used in passenger cars as flooring material.
Other Miscellaneous Applications :
Headliners,
Filtration,
Insulation Felts, etc.

## Included activities start
The activity starts with opening, mixing, layering, humidification,carding, Needle punching

## Included activities end
This process ends with cutting and packaging of Needle punched Nonwovewoven fabric

## Geography
This dataset is a copy of Indian dataset

## Reference product
- textile, nonwoven polyester: 1 kg; name RP_amount_1; By-product classification allocatable product; CPC 26710: Woven fabrics of man-made filament yarn, obtained from high tenacity yarn of nylon or other polyamides, of pol[…]; HS2017 560394: Nonwovens; whether or not impregnated, coated, covered or laminated, not of man-made filaments, (weighing m[...]
  production volume 5.8888e10 kg; name RP_PV_1
    According to NONWOVENS INDUSTRY magazine, the production volume of synthetic fibers in 2016 was 71 million tons. From those, 83.7% is calculated to be polyester fibers as reported in "Textile exchange".
    References: NONWOVENS INDUSTRY magazine, accessed at: https://www.nonwovens-industry.com/about-us/ on 09/04/2018
    Textile exchange, TE Preferred Fiber Market Report accessed, 2016 at: http://textileexchange.org/wp-content/uploads/2017/02/TE-Preferred-Fiber-Market-Report-Oct2016-1.pdf on 09/04/2018
  property heating value, net 18.94 MJ
    LHV is calculated based on the Carbon content of the product. More details can be found on the respective documentation.
  property price 1.51 EUR2005
    Estimated value. Various souces report a value around, what correspond to, 2.6 EUR per kg of non woven polyester fabric (madeinchina.com. Retrieved from: https://www.made-in-china.com/productdirectory.do?word=polyester+non+woven+fabric&subaction=hunt&style=b&mode=and&code=0&comProvince=nolimit&order=0&isOpenCorrection=1, accessed 1Feb2018; Alibaba.com, 2018. Retrieved from: https://www.alibaba.com/showroom/100-polyester-non-woven-fabric.html, accessed 1Feb2018).
  properties: carbon allocation 0.625 kg, carbon content 0.625, carbon content, fossil 0.625, carbon content, non-fossil 0, dry mass 1 kg, water content 0, water in wet mass 0 kg, wet mass 1 kg

## Inputs from technosphere
- building, hall: 0.00208333 m2; lognormal variance with pedigree 0.3106, pedigree (2,1,4,5,1)
  square meters of building divided by production per year and life time of the plant
- electricity, low voltage: 0.00106441, 0.000329401, 0.000150329, 0.00031067, 0.0167815, 0.000278856, 0.00121839, 0.000141146, 0.000113515, 0.000304692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 kWh (47 suppliers, which the file names only by identifier); sum of these 0.41 kWh; lognormal variance with pedigree 0.0126, pedigree (1,4,4,5,1)
  sum of electricity used for blowroom, carding , needling, compressor and cutting
- fibre and fabric waste, polyester: -0.035 kg; name FFwaste; lognormal variance with pedigree 0.0046, pedigree (1,4,1,5,1)
  includes both fibre and fabric cuttings. Used for manufacture of low grade floor covering/carpet
  production volume; = RP_PV_1* FFwaste/ RP_amount_1
    Calculated from production volume of reference product using the relative outputs.
  properties: carbon content, fossil 0.58584, dry mass 1 kg, heating value, net 18.94 MJ, wet mass 1 kg
  note on carbon content, fossil: 0.585840437101837 for polyester resin production, unsaturated. (C8H6O2, C8H16O4, C5H12O2,C4H2O3)n was used as a representative formula for unsaturated polyester resin. This formula corresponds to the M390B Unsaturated Polyester Resin (National Industrial Chemicals Notification and Assessment Scheme, full public report, 1994).
- fibre, polyester: 1.035 kg; lognormal variance with pedigree 0.0126, pedigree (1,4,4,5,1)
  properties: carbon content, fossil 0.625, dry mass 1 kg, heating value, net 18.94 MJ, price 2.188 EUR2005, wet mass 1 kg
- wastewater, average: -1.42565e-7, -9.57485e-6, -4.0042e-5, -2.4063e-7 m3 (4 suppliers, which the file names only by identifier); sum of these -5e-5 m3; lognormal variance with pedigree 0.0046, pedigree (1,4,1,5,1)
  0.05 kgs converted to cubic meters
  production volume; = RP_PV_1* wastewater/ RP_amount_1
    Calculated from production volume of reference product using the relative outputs.
  properties: carbon content, non-fossil 0.194039, dry mass 0.346837 kg, water content 2882.2, wet mass 1000 kg
  note on carbon content, non-fossil: 0.0673 kg TOC/m3 (Tab A.17, ecoinvent v2.2 report 13_I). TOC was considered as Total Carbon.

## Inputs from nature
- Water, well, in ground [natural resource, in water]: 0.0015 m3; name Water; lognormal variance with pedigree 0.0126, pedigree (1,4,4,5,1)
  1.5 kg transformed in cubic meters

## Emissions to nature
- Water [air, unspecified]: 0.00145 m3; lognormal variance with pedigree 0.0126, pedigree (1,4,4,5,1)
  1.45 kg transformed in cubic meters.

## Sampling procedure
Extrapolated from IN data, uncertainty adjusted accordingly
