# textile production, cotton, weaving

Dataset: EcoSpold 2, unit process
Geography: RoW
Time period: 2016-01-01 to 2023-12-31
Technology level: current
Classification: EcoSpold01Categories: textiles/processing
Classification: ISIC rev.4 ecoinvent: 1312:Weaving of textiles
Scenario: Business-as-Usual
System model: Allocation, cut-off by classification
Generated by: [System]
Published in: Cotton Inc 2017
Database: ecoinvent
isCopyrightProtected: true
accessRestrictedTo: 1

## General comment
Inventory refers to the weaving of 1 kg yarn into textile, The activity begins with sizing and warping of yarn and ends with the woven fabric. It includes electricity use for warping, weaving and air conditioning. The yarn itself is not included. Data collected for a fabric of 236 grams per square meter (gsm) with a yarn of 20Tex (Nm50). Compared to the range of data available in literature (2-20 kWh/kg), the electricity use (3.1kWh/kg) is in the lower range. Data collected from mostly vertically integrated mills on a global level.
[This dataset is meant to replace the following datasets:
- weaving, cotton, GLO, 2015 - 2016]

## Included activities start
The activity starts with warping and sizing of cotton yarn.

## Included activities end
This process ends with conversion of cotton yarn at weaving plant to 1 kg of woven fabric.

## Geography
Global average based on data from Bangladesh.

## Technology
Dataset extrapolated to correspond to global conditions. The data was not collected for a specific type of technology but is specific for cotton (does not include water-jet technology).

## Reference product
- textile, woven cotton: 1 kg; name RP_amount_1; By-product classification allocatable product; CPC 26620: Woven fabrics of cotton, containing 85% or more by weight of cotton, weighing more than 200 g/m2; HS2017 5208: Woven fabrics of cotton, containing 85% or more by weight of cotton, weighing not more than 200 g/m2
  production volume 9.314e11 kg; name PV_Woven; = 1492627500*(100/0.16)
    Annual production volume was scaled based on GDP and the Bangladesh production volume, given the fact that Bangladesh accounts for approximately 0.16% of the Global GDP. Value from Bangladesh:
    Production volume was found in "The Fibre Year 2017". It is also assumed that 50% of it refers to woven fabric.
    Reference: The Fibre Year 2017, accessed https://www.thefiberyear.com/home/ on 4/4/2018
  property carbon content, non-fossil 0.46
    Cotton fibers are considered to have a 46% C-content in dry mass ("Evolutionary and Biochemical Aspects", A.D. Kay and T. Vrede (in Global Ecology, 2010, Elsevier B.V., S.E. Jørgensen Ed.)
  property heating value, net 13.94 MJ
    LHV is calculated based on the Carbon content of the product. More details can be found on the respective documentation.
  properties: carbon allocation 0.46 kg, carbon content 0.46, carbon content, fossil 0, dry mass 1 kg, price 1.77 EUR2005, water content 0, water in wet mass 0 kg, wet mass 1 kg

## Inputs from technosphere
- building, hall: 1.4e-5 m2; lognormal variance with pedigree 0.0053, pedigree (3,3,3,3,1)
  Industry data from Bangladesh. Uncertainty has been adapted accordingly.
- electricity, medium voltage: 0.00606979, 0.0658728, 0.00577419, 0.00186808, 0.10349, 0.013335, 0.000991874, 0.00219523, 0.0045801, 0.00109539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 kWh (47 suppliers, which the file names only by identifier); sum of these 3.09 kWh; lognormal variance with pedigree 0.0053, pedigree (3,3,3,3,1)
- heat, central or small-scale, other than natural gas: 2.3 MJ; lognormal variance with pedigree 0.0146, pedigree (4,4,3,5,1)
  Industry data
  properties: heating value, net 1 MJ
- maize starch: 0.037 kg; lognormal variance with pedigree 0.0126, pedigree (4,1,3,5,1)
  Industry data.
  properties: carbon content, non-fossil 0.46, dry mass 0.86 kg, heating value, net 11.64 MJ, water content 0.162791, wet mass 1 kg
  note on carbon content, non-fossil: C-content of starch is considered 46% on dry mass basis (from "Evolutionary and Biochemical Aspects", A.D. Kay and T. Vrede (in Global Ecology, 2010, Elsevier B.V., S.E. Jørgensen Ed.)).
- municipal solid waste: -0.000481849, -1.01414e-7, -5.14858e-8, -2.27786e-8, -1.66313e-5, -6.44353e-7, -8.54041e-7, -2.14337e-6, -7.09652e-8, -6.31173e-7 kg (10 suppliers, which the file names only by identifier); sum of these -0.000503 kg; lognormal variance with pedigree 0.0033, pedigree (2,4,1,3,1)
  inorganic waste.
  production volume; = PV_Woven * (BP_amount_1 / RP_amount_1)
    Calculated from production volume of reference product using the relative outputs.
  properties: carbon content, fossil 0.171549, carbon content, non-fossil 0.261655, dry mass 0.771 kg, heating value, net 11.74 MJ, water content 0.297017, wet mass 1 kg
  note on carbon content, fossil: MSW composition in tab 4.1, ecoinvent v2.2 report 13_I. C content referred to 1 kg DM
  note on heating value, net: Value taken from the general comment of the treatment dataset.
- polymethyl methacrylate, beads: 0.0009 kg; lognormal variance with pedigree 0.0039, pedigree (2,3,3,3,1)
  Proxy for PVA size.
  properties: carbon content, fossil 0.6, dry mass 1 kg, heating value, net 27.86 MJ, wet mass 1 kg
- rosin size, for paper production: 0.00355746, 0.00744254 kg (2 suppliers, which the file names only by identifier); sum of these 0.011 kg; lognormal variance with pedigree 0.0039, pedigree (2,3,3,3,1)
  Proxy for acrylic size.
  properties: carbon content, non-fossil 0.515474, dry mass 1 kg, heating value, net 15.62 MJ, wet mass 1 kg
- waste textile, soiled: -1.23441e-5, -7.65587e-6 kg (2 suppliers, which the file names only by identifier); sum of these -2e-5 kg; lognormal variance with pedigree 0.0033, pedigree (2,4,1,3,1)
  waste textile for disposal.
  production volume; = PV_Woven * (waste_Tex / RP_amount_1)
    Calculated from production volume of reference product using the relative outputs.
  properties: carbon content, non-fossil 0.570519, dry mass 0.75 kg, heating value, net 14.45 MJ, water content 0.333333, wet mass 1 kg
- waste yarn and waste textile: -0.0307093, -0.0196707 kg (2 suppliers, which the file names only by identifier); sum of these -0.05038 kg; lognormal variance with pedigree 0.0019, pedigree (2,3,1,3,1)
  Waste produced during the process.
  production volume; = PV_woven* waste_Yarn
    Calculated based on the production volume of woven yarn.
  properties: carbon content, non-fossil 0.44455, dry mass 0.97917 kg, heating value, net 13.14 MJ, water content 0.0212731, wet mass 1 kg
- wastewater, unpolluted: -0.000828991, -4.0089e-6 m3 (2 suppliers, which the file names only by identifier); sum of these -0.000833 m3; = water*0.7; lognormal variance with pedigree 0.0047, pedigree (3,4,1,3,1)
  70% of water assumed to go to wastewater. Emissions in water are entered separately.
  production volume; = PV_Woven * (BP_amount_2 / RP_amount_1)
    Calculated from production volume of reference product using the relative outputs.
  properties: carbon content, fossil 0.00178991, carbon content, non-fossil 0.00178991, dry mass 0.337476 kg, water content 2962.17, wet mass 1000 kg
  note on carbon content, fossil: Assumed to be like in tap water. Bicarbonate content is 2.93 mol/m3. CO2 content is 0.1 mol/m3 (ecoinvent v2.2 report 8, Tab 93.1).
- yarn, cotton: 1.0504 kg; lognormal variance with pedigree 0.0066, pedigree (1,4,3,5,1)
  Input of raw material that is transformed into textile.
  properties: carbon content, non-fossil 0.46, dry mass 0.94 kg, heating value, net 12.95 MJ, water content 0.0638298, wet mass 1 kg

## Inputs from nature
- Water, well, in ground [natural resource, in water]: 0.00119 m3; name water; lognormal variance with pedigree 0.0047, pedigree (1,4,3,3,1)
  1.19 lit transformed in cubic meters

## Emissions to nature
All rows: lognormal variance with pedigree 0.0053, pedigree (2,4,3,3,1)
- Water [air, unspecified]: 0.000357 m3; = water*0.3
  30% of water assumed to evaporate.
- AOX, Adsorbable Organic Halides [water, unspecified]: 4.0144e-6 kg
- Ammonium [water, unspecified]: 5.304e-6 kg
- Aniline [water, unspecified]: 2.652e-7 kg
- Antimony ion [water, unspecified]: 2.652e-8 kg
- BOD5, Biological Oxygen Demand [water, unspecified]: 9.7136e-6 kg
- COD, Chemical Oxygen Demand [water, unspecified]: 2.9744e-5 kg
- Chlorine [water, unspecified]: 1.3312e-7 kg
- Chromium III [water, unspecified]: 4.3992e-9 kg
- Chromium VI [water, unspecified]: 1.3312e-7 kg
- Copper ion [water, unspecified]: 3.172e-9 kg
- DOC, Dissolved Organic Carbon [water, unspecified]: 1.0504e-6 kg
- Nickel II [water, unspecified]: 9.776e-10 kg
- Nitrogen [water, unspecified]: 1.00152e-5 kg
- Oils, unspecified [water, unspecified]: 1.5496e-6 kg
- Phosphorus [water, unspecified]: 3.5048e-7 kg
- Sulfide [water, unspecified]: 2.652e-7 kg
- Suspended solids, unspecified [water, unspecified]: 1.3e-5 kg
- TOC, Total Organic Carbon [water, unspecified]: 1.0504e-6 kg
- Zinc II [water, unspecified]: 2.6832e-9 kg

## Sampling procedure
Industry data.

## Extrapolations
Extrapolated from data from mostly vertically integrated mills.
